$PROBLEM LibeR ADVAN1 prediction validation
$INPUT ID TIME EVID AMT RATE CMT DV MDV
$DATA advan1.dat
$SUBROUTINES ADVAN1 TRANS2
$PK
CL=THETA(1)*EXP(ETA(1))
V=THETA(2)
S1=V
$ERROR
IPRED=F
Y=F+EPS(1)
$THETA 2 FIX
$THETA 20 FIX
$OMEGA 0 FIX
$SIGMA 1 FIX
$ESTIMATION MAXEVAL=0 NOABORT
$TABLE ID TIME EVID AMT CMT IPRED NOPRINT ONEHEADER FORMAT=s1PE15.8 FILE=advan1.tab
